<neuroml xmlns="http://www.neuroml.org/schema/neuroml2"  xmlns:xs="http://www.w3.org/2001/XMLSchema" xmlns:xsi="http://www.w3.org/2001/XMLSchema-instance" xsi:schemaLocation="http://www.neuroml.org/schema/neuroml2 https://raw.github.com/NeuroML/NeuroML2/development/Schemas/NeuroML2/NeuroML_v2.3.1.xsd" id="Golgi_cell_network">
    <annotation>

            <rdf:RDF
              xmlns:dcterms="http://purl.org/dc/terms/"
              xmlns:rdf="http://www.w3.org/1999/02/22-rdf-syntax-ns#"
              xmlns:dc="http://purl.org/dc/elements/1.1/"
              xmlns:bqbiol="http://biomodels.net/biology-qualifiers/"
              xmlns:orcid="https://orcid.org/"
              xmlns:foaf="http://xmlns.com/foaf/0.1/"
              xmlns:prism="http://prismstandard.org/namespaces/basic/2.0/"
            >
              <rdf:Description rdf:about="Golgi_cell_network">
                <dc:title>Cerebellar Golgi Cell network model</dc:title>
                <dcterms:abstract>Cerebellar Golgi Cell network model</dcterms:abstract>
                <prism:keyword>
                  <rdf:Bag>
                    <rdf:li>Golgi cell</rdf:li>
                    <rdf:li>Cerebellum</rdf:li>
                  </rdf:Bag>
                </prism:keyword>
                <bqbiol:isVersionOf>
                  <rdf:Bag>
                    <rdf:li rdf:resource="https://github.com/harshagurnani/GoC_Network_Sim_BehInputs"/>
                  </rdf:Bag>
                </bqbiol:isVersionOf>
                <dc:source>
                  <rdf:Bag>
                    <rdf:li rdf:resource="https://github.com/sanjayankur31/GolgiCellNetwork/"/>
                  </rdf:Bag>
                </dc:source>
                <dcterms:references>
                  <rdf:Bag>
                    <rdf:li rdf:resource="https://doi.org/10.1016/j.neuron.2021.03.027"/>
                    <rdf:li rdf:resource="https://doi.org/10.1016/j.neuron.2010.06.028"/>
                  </rdf:Bag>
                </dcterms:references>
                <dc:creator>
                  <rdf:Bag>
                    <rdf:li rdf:resource="#Ankur_Sinha"/>
                  </rdf:Bag>
                </dc:creator>
                <dcterms:created>
                  <rdf:Description>
                    <dcterms:W3CDTF>2025-06-21</dcterms:W3CDTF>
                  </rdf:Description>
                </dcterms:created>
              </rdf:Description>
              <rdf:Description rdf:about="#Ankur_Sinha">
                <foaf:name>Ankur Sinha</foaf:name>
                <dc:identifier>ankur.sinha@ucl.ac.uk</dc:identifier>
                <orcid:id rdf:resource="https://orcid.org/0000-0001-7568-7167"/>
              </rdf:Description>
            </rdf:RDF>

    </annotation>
    <include href="./cells/Golgi/GoC_2Pools.cell.nml"/>
    <include href="./cells/Golgi/GoC_00736.cell.nml"/>
    <include href="./cells/Golgi/GoC_00398.cell.nml"/>
    <include href="./cells/Golgi/GoC_00428.cell.nml"/>
    <include href="./cells/Golgi/GoC_00160.cell.nml"/>
    <gapJunction id="Gap_junction" conductance="426pS"/>
    <network id="Golgi_cell_network">
        <population id="pop_GoCl_2Pools" component="GoCl_2Pools" type="populationList">
            <instance id="0">
                <location x="461.41305225151882" y="105.544649091638576" z="71.569694823441026"/>
            </instance>
            <instance id="1">
                <location x="147.594791201135223" y="438.831876155148677" z="55.758102120299554"/>
            </instance>
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        </population>
        <population id="pop_GoC_00736" component="GoC_00736" type="populationList">
            <instance id="0">
                <location x="439.941204876230756" y="199.527356053720524" z="6.687131049893669"/>
            </instance>
            <instance id="1">
                <location x="421.05239384476107" y="391.463742627961778" z="84.255584932945212"/>
            </instance>
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        </population>
        <population id="pop_GoC_00398" component="GoC_00398" type="populationList">
            <instance id="0">
                <location x="396.501352849396028" y="401.467938730308049" z="73.166963748422617"/>
            </instance>
            <instance id="1">
                <location x="340.901423249879031" y="90.308958749611421" z="86.932151747490749"/>
            </instance>
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        </population>
        <population id="pop_GoC_00428" component="GoC_00428" type="populationList">
            <instance id="0">
                <location x="456.332157475537429" y="27.648591775645937" z="22.038775210051398"/>
            </instance>
            <instance id="1">
                <location x="403.281975294575886" y="158.06431619737188" z="36.415130212662184"/>
            </instance>
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        </population>
        <population id="pop_GoC_00160" component="GoC_00160" type="populationList">
            <instance id="0">
                <location x="34.124639553369697" y="434.381985190118996" z="25.022461793899321"/>
            </instance>
            <instance id="1">
                <location x="426.796372500330222" y="185.278929197687404" z="87.216381162018436"/>
            </instance>
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        </population>
        <electricalProjection id="GJ_0_0" presynapticPopulation="pop_GoCl_2Pools" postsynapticPopulation="pop_GoCl_2Pools">
            <electricalConnectionInstanceW id="17" preCell="../pop_GoCl_2Pools/0/GoCl_2Pools" preSegment="1" postCell="../pop_GoCl_2Pools/18/GoCl_2Pools" synapse="Gap_junction" weight="2.777289826874043"/>
            <electricalConnectionInstanceW id="121" preCell="../pop_GoCl_2Pools/1/GoCl_2Pools" preSegment="1" postCell="../pop_GoCl_2Pools/9/GoCl_2Pools" synapse="Gap_junction" weight="0.209543630127432"/>
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        </electricalProjection>
        <electricalProjection id="GJ_0_1" presynapticPopulation="pop_GoCl_2Pools" postsynapticPopulation="pop_GoC_00736">
            <electricalConnectionInstanceW id="22" preCell="../pop_GoCl_2Pools/0/GoCl_2Pools" preSegment="1" postCell="../pop_GoC_00736/0/GoC_00736" postSegment="3" synapse="Gap_junction" weight="0.195722179972233"/>
            <electricalConnectionInstanceW id="31" preCell="../pop_GoCl_2Pools/0/GoCl_2Pools" preSegment="3" postCell="../pop_GoC_00736/9/GoC_00736" postSegment="2" synapse="Gap_junction" weight="0.678933598074029"/>
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        </electricalProjection>
        <electricalProjection id="GJ_0_2" presynapticPopulation="pop_GoCl_2Pools" postsynapticPopulation="pop_GoC_00398">
            <electricalConnectionInstanceW id="46" preCell="../pop_GoCl_2Pools/0/GoCl_2Pools" preSegment="1" postCell="../pop_GoC_00398/1/GoC_00398" synapse="Gap_junction" weight="0.166455048054561"/>
            <electricalConnectionInstanceW id="65" preCell="../pop_GoCl_2Pools/0/GoCl_2Pools" preSegment="2" postCell="../pop_GoC_00398/20/GoC_00398" postSegment="2" synapse="Gap_junction" weight="0.199323975980924"/>
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        </electricalProjection>
        <electricalProjection id="GJ_0_3" presynapticPopulation="pop_GoCl_2Pools" postsynapticPopulation="pop_GoC_00428">
            <electricalConnectionInstanceW id="68" preCell="../pop_GoCl_2Pools/0/GoCl_2Pools" preSegment="1" postCell="../pop_GoC_00428/0/GoC_00428" postSegment="3" synapse="Gap_junction" weight="0.351783153761701"/>
            <electricalConnectionInstanceW id="69" preCell="../pop_GoCl_2Pools/0/GoCl_2Pools" preSegment="3" postCell="../pop_GoC_00428/1/GoC_00428" postSegment="1" synapse="Gap_junction" weight="0.412628597633166"/>
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        </electricalProjection>
        <electricalProjection id="GJ_0_4" presynapticPopulation="pop_GoCl_2Pools" postsynapticPopulation="pop_GoC_00160">
            <electricalConnectionInstanceW id="101" preCell="../pop_GoCl_2Pools/0/GoCl_2Pools" preSegment="3" postCell="../pop_GoC_00160/10/GoC_00160" postSegment="1" synapse="Gap_junction" weight="0.275218819664056"/>
            <electricalConnectionInstanceW id="110" preCell="../pop_GoCl_2Pools/0/GoCl_2Pools" preSegment="1" postCell="../pop_GoC_00160/19/GoC_00160" postSegment="1" synapse="Gap_junction" weight="0.184601385296584"/>
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        </electricalProjection>
        <electricalProjection id="GJ_1_1" presynapticPopulation="pop_GoC_00736" postsynapticPopulation="pop_GoC_00736">
            <electricalConnectionInstanceW id="2379" preCell="../pop_GoC_00736/0/GoC_00736" preSegment="2" postCell="../pop_GoC_00736/11/GoC_00736" synapse="Gap_junction" weight="0.731117057962712"/>
            <electricalConnectionInstanceW id="2387" preCell="../pop_GoC_00736/0/GoC_00736" preSegment="3" postCell="../pop_GoC_00736/19/GoC_00736" postSegment="3" synapse="Gap_junction" weight="0.225069578646485"/>
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        </electricalProjection>
        <electricalProjection id="GJ_1_3" presynapticPopulation="pop_GoC_00736" postsynapticPopulation="pop_GoC_00428">
            <electricalConnectionInstanceW id="2415" preCell="../pop_GoC_00736/0/GoC_00736" preSegment="2" postCell="../pop_GoC_00428/1/GoC_00428" postSegment="1" synapse="Gap_junction" weight="0.732757197049578"/>
            <electricalConnectionInstanceW id="2420" preCell="../pop_GoC_00736/0/GoC_00736" preSegment="2" postCell="../pop_GoC_00428/6/GoC_00428" postSegment="1" synapse="Gap_junction" weight="0.450924676376772"/>
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        </electricalProjection>
        <electricalProjection id="GJ_1_4" presynapticPopulation="pop_GoC_00736" postsynapticPopulation="pop_GoC_00160">
            <electricalConnectionInstanceW id="2438" preCell="../pop_GoC_00736/0/GoC_00736" preSegment="1" postCell="../pop_GoC_00160/1/GoC_00160" postSegment="2" synapse="Gap_junction" weight="0.444280316483756"/>
            <electricalConnectionInstanceW id="2455" preCell="../pop_GoC_00736/0/GoC_00736" preSegment="3" postCell="../pop_GoC_00160/18/GoC_00160" postSegment="3" synapse="Gap_junction" weight="3.877069140377348"/>
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        </electricalProjection>
        <electricalProjection id="GJ_1_2" presynapticPopulation="pop_GoC_00736" postsynapticPopulation="pop_GoC_00398">
            <electricalConnectionInstanceW id="2481" preCell="../pop_GoC_00736/1/GoC_00736" preSegment="3" postCell="../pop_GoC_00398/0/GoC_00398" synapse="Gap_junction" weight="2.094641342148328"/>
            <electricalConnectionInstanceW id="2490" preCell="../pop_GoC_00736/1/GoC_00736" preSegment="2" postCell="../pop_GoC_00398/9/GoC_00398" synapse="Gap_junction" weight="0.086193634062519"/>
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        </electricalProjection>
        <electricalProjection id="GJ_2_2" presynapticPopulation="pop_GoC_00398" postsynapticPopulation="pop_GoC_00398">
            <electricalConnectionInstanceW id="4219" preCell="../pop_GoC_00398/0/GoC_00398" postCell="../pop_GoC_00398/11/GoC_00398" postSegment="1" synapse="Gap_junction" weight="0.268189935122172"/>
            <electricalConnectionInstanceW id="4225" preCell="../pop_GoC_00398/0/GoC_00398" preSegment="3" postCell="../pop_GoC_00398/17/GoC_00398" postSegment="3" synapse="Gap_junction" weight="1.291140741826069"/>
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        </electricalProjection>
        <electricalProjection id="GJ_2_3" presynapticPopulation="pop_GoC_00398" postsynapticPopulation="pop_GoC_00428">
            <electricalConnectionInstanceW id="4240" preCell="../pop_GoC_00398/0/GoC_00398" postCell="../pop_GoC_00428/9/GoC_00428" synapse="Gap_junction" weight="0.369262398807122"/>
            <electricalConnectionInstanceW id="4253" preCell="../pop_GoC_00398/0/GoC_00398" preSegment="2" postCell="../pop_GoC_00428/22/GoC_00428" postSegment="2" synapse="Gap_junction" weight="0.284028987580332"/>
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        </electricalProjection>
        <electricalProjection id="GJ_2_4" presynapticPopulation="pop_GoC_00398" postsynapticPopulation="pop_GoC_00160">
            <electricalConnectionInstanceW id="4260" preCell="../pop_GoC_00398/0/GoC_00398" postCell="../pop_GoC_00160/6/GoC_00160" postSegment="3" synapse="Gap_junction" weight="0.206292911971369"/>
            <electricalConnectionInstanceW id="4261" preCell="../pop_GoC_00398/0/GoC_00398" preSegment="3" postCell="../pop_GoC_00160/7/GoC_00160" postSegment="1" synapse="Gap_junction" weight="0.319419034538398"/>
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        </electricalProjection>
        <electricalProjection id="GJ_3_3" presynapticPopulation="pop_GoC_00428" postsynapticPopulation="pop_GoC_00428">
            <electricalConnectionInstanceW id="5524" preCell="../pop_GoC_00428/0/GoC_00428" preSegment="3" postCell="../pop_GoC_00428/5/GoC_00428" postSegment="2" synapse="Gap_junction" weight="0.150231765505962"/>
            <electricalConnectionInstanceW id="5525" preCell="../pop_GoC_00428/0/GoC_00428" preSegment="2" postCell="../pop_GoC_00428/6/GoC_00428" postSegment="2" synapse="Gap_junction" weight="0.153208971180601"/>
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        </electricalProjection>
        <electricalProjection id="GJ_3_4" presynapticPopulation="pop_GoC_00428" postsynapticPopulation="pop_GoC_00160">
            <electricalConnectionInstanceW id="5552" preCell="../pop_GoC_00428/0/GoC_00428" preSegment="2" postCell="../pop_GoC_00160/10/GoC_00160" postSegment="3" synapse="Gap_junction" weight="0.452160049546057"/>
            <electricalConnectionInstanceW id="5561" preCell="../pop_GoC_00428/0/GoC_00428" preSegment="3" postCell="../pop_GoC_00160/19/GoC_00160" postSegment="3" synapse="Gap_junction" weight="0.384895053687606"/>
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        </electricalProjection>
        <electricalProjection id="GJ_4_4" presynapticPopulation="pop_GoC_00160" postsynapticPopulation="pop_GoC_00160">
            <electricalConnectionInstanceW id="6340" preCell="../pop_GoC_00160/1/GoC_00160" preSegment="3" postCell="../pop_GoC_00160/18/GoC_00160" synapse="Gap_junction" weight="0.366471401743461"/>
            <electricalConnectionInstanceW id="6354" preCell="../pop_GoC_00160/2/GoC_00160" preSegment="2" postCell="../pop_GoC_00160/12/GoC_00160" postSegment="3" synapse="Gap_junction" weight="0.175974950605957"/>
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        </electricalProjection>
    </network>
</neuroml>
