<neuroml xmlns="http://www.neuroml.org/schema/neuroml2"  xmlns:xs="http://www.w3.org/2001/XMLSchema" xmlns:xsi="http://www.w3.org/2001/XMLSchema-instance" xsi:schemaLocation="http://www.neuroml.org/schema/neuroml2 https://raw.github.com/NeuroML/NeuroML2/development/Schemas/NeuroML2/NeuroML_v2.3.1.xsd" id="Golgi_cell_network">
    <include href="./cells/Golgi/GoC_00177.cell.nml"/>
    <include href="./cells/Golgi/GoC_00263.cell.nml"/>
    <include href="./cells/Golgi/GoC_00514.cell.nml"/>
    <include href="./cells/Golgi/GoC_00659.cell.nml"/>
    <include href="./cells/Golgi/GoC_00856.cell.nml"/>
    <network id="Golgi_cell_network">
        <population id="GoC_00177_pop" component="GoC_00177" type="populationList">
            <instance id="0">
                <location x="92.143541906906819" y="23.677639400757567" z="67.488094358233013"/>
            </instance>
            <instance id="1">
                <location x="297.312389967224419" y="266.655081499375285" z="4.332406269480349"/>
            </instance>
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        </population>
        <population id="GoC_00263_pop" component="GoC_00263" type="populationList">
            <instance id="0">
                <location x="162.853707212673612" y="96.809345076888604" z="45.781164889742755"/>
            </instance>
            <instance id="1">
                <location x="460.201285546543886" y="439.534580757337892" z="25.261575504653024"/>
            </instance>
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        </population>
        <population id="GoC_00514_pop" component="GoC_00514" type="populationList">
            <instance id="0">
                <location x="350.677689618346506" y="311.38829330159956" z="49.368264574711205"/>
            </instance>
            <instance id="1">
                <location x="420.268850059244357" y="356.048493471823633" z="44.390898141585247"/>
            </instance>
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        </population>
        <population id="GoC_00659_pop" component="GoC_00659" type="populationList">
            <instance id="0">
                <location x="11.34023806239165" y="427.527343065828347" z="30.633720286627241"/>
            </instance>
            <instance id="1">
                <location x="379.391722376952089" y="281.637555069933057" z="3.816418217864814"/>
            </instance>
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        </population>
        <population id="GoC_00856_pop" component="GoC_00856" type="populationList">
            <instance id="0">
                <location x="386.61935744660525" y="440.171790638602204" z="63.739144695740521"/>
            </instance>
            <instance id="1">
                <location x="426.301120127276533" y="298.977685762213525" z="69.38466603020629"/>
            </instance>
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        </population>
    </network>
</neuroml>
