<neuroml xmlns="http://www.neuroml.org/schema/neuroml2"  xmlns:xs="http://www.w3.org/2001/XMLSchema" xmlns:xsi="http://www.w3.org/2001/XMLSchema-instance" xsi:schemaLocation="http://www.neuroml.org/schema/neuroml2 https://raw.github.com/NeuroML/NeuroML2/development/Schemas/NeuroML2/NeuroML_v2.3.1.xsd" id="test_golgi_cells">
    <include href="GoC_00613.cell.nml"/>
    <include href="GoC_00276.cell.nml"/>
    <include href="GoC_00025.cell.nml"/>
    <include href="GoC_00535.cell.nml"/>
    <include href="GoC_00848.cell.nml"/>
    <include href="GoC_00536.cell.nml"/>
    <include href="GoC_00854.cell.nml"/>
    <include href="GoC_00625.cell.nml"/>
    <include href="GoC_00977.cell.nml"/>
    <include href="GoC_00856.cell.nml"/>
    <include href="GoC_00784.cell.nml"/>
    <include href="GoC_00160.cell.nml"/>
    <include href="GoC_00305.cell.nml"/>
    <include href="GoC_00541.cell.nml"/>
    <include href="GoC_00415.cell.nml"/>
    <include href="GoC_00748.cell.nml"/>
    <include href="GoC_00514.cell.nml"/>
    <include href="Golgi_040408_C1.cell.nml"/>
    <include href="GoC_00928.cell.nml"/>
    <include href="GoC_00427.cell.nml"/>
    <include href="GoC_00241.cell.nml"/>
    <include href="GoC_2Pools.cell.nml"/>
    <include href="GoC_00956.cell.nml"/>
    <include href="GoC_00880.cell.nml"/>
    <include href="GoC_00707.cell.nml"/>
    <include href="GoC_00128.cell.nml"/>
    <include href="GoC_00428.cell.nml"/>
    <include href="GoC.cell.nml"/>
    <include href="GoC_00669.cell.nml"/>
    <include href="GoC_00975.cell.nml"/>
    <include href="GoC_00000.cell.nml"/>
    <include href="GoC_00298.cell.nml"/>
    <include href="GoC_00774.cell.nml"/>
    <include href="GoC_00271.cell.nml"/>
    <include href="GoC_00348.cell.nml"/>
    <include href="GoC_00735.cell.nml"/>
    <include href="GoC_00416.cell.nml"/>
    <include href="GoC_00736.cell.nml"/>
    <include href="GoC_00001.cell.nml"/>
    <include href="GoC_00809.cell.nml"/>
    <include href="GoC_040408_C1.cell.nml"/>
    <include href="GoC_00744.cell.nml"/>
    <include href="GoC_00508.cell.nml"/>
    <include href="GoC_00263.cell.nml"/>
    <include href="GoC_00458.cell.nml"/>
    <include href="GoC_00860.cell.nml"/>
    <include href="GoC_00435.cell.nml"/>
    <include href="GoC_00829.cell.nml"/>
    <include href="GoC_00901.cell.nml"/>
    <include href="GoC_00601.cell.nml"/>
    <include href="GoC_00398.cell.nml"/>
    <include href="GoC_00995.cell.nml"/>
    <include href="GoC_00665.cell.nml"/>
    <include href="GoC_00711.cell.nml"/>
    <include href="GoC_00177.cell.nml"/>
    <include href="GoC_00032.cell.nml"/>
    <include href="GoC_00659.cell.nml"/>
    <pulseGenerator id="pg" delay="5ms" duration="1000ms" amplitude="0.07nA"/>
    <network id="test_golgi_cell_network">
        <population id="golgi_cell_pop_0" component="GoC_00613" size="1"/>
        <population id="golgi_cell_pop_1" component="GoC_00276" size="1"/>
        <population id="golgi_cell_pop_2" component="GoC_00025" size="1"/>
        <population id="golgi_cell_pop_3" component="GoC_00535" size="1"/>
        <population id="golgi_cell_pop_4" component="GoC_00848" size="1"/>
        <population id="golgi_cell_pop_5" component="GoC_00536" size="1"/>
        <population id="golgi_cell_pop_6" component="GoC_00854" size="1"/>
        <population id="golgi_cell_pop_7" component="GoC_00625" size="1"/>
        <population id="golgi_cell_pop_8" component="GoC_00977" size="1"/>
        <population id="golgi_cell_pop_9" component="GoC_00856" size="1"/>
        <population id="golgi_cell_pop_10" component="GoC_00784" size="1"/>
        <population id="golgi_cell_pop_11" component="GoC_00160" size="1"/>
        <population id="golgi_cell_pop_12" component="GoC_00305" size="1"/>
        <population id="golgi_cell_pop_13" component="GoC_00541" size="1"/>
        <population id="golgi_cell_pop_14" component="GoC_00415" size="1"/>
        <population id="golgi_cell_pop_15" component="GoC_00748" size="1"/>
        <population id="golgi_cell_pop_16" component="GoC_00514" size="1"/>
        <population id="golgi_cell_pop_17" component="Golgi_040408_C1" size="1"/>
        <population id="golgi_cell_pop_18" component="GoC_00928" size="1"/>
        <population id="golgi_cell_pop_19" component="GoC_00427" size="1"/>
        <population id="golgi_cell_pop_20" component="GoC_00241" size="1"/>
        <population id="golgi_cell_pop_21" component="GoCl_2Pools" size="1"/>
        <population id="golgi_cell_pop_22" component="GoC_00956" size="1"/>
        <population id="golgi_cell_pop_23" component="GoC_00880" size="1"/>
        <population id="golgi_cell_pop_24" component="GoC_00707" size="1"/>
        <population id="golgi_cell_pop_25" component="GoC_00128" size="1"/>
        <population id="golgi_cell_pop_26" component="GoC_00428" size="1"/>
        <population id="golgi_cell_pop_27" component="GoCl" size="1"/>
        <population id="golgi_cell_pop_28" component="GoC_00669" size="1"/>
        <population id="golgi_cell_pop_29" component="GoC_00975" size="1"/>
        <population id="golgi_cell_pop_30" component="GoC_00000" size="1"/>
        <population id="golgi_cell_pop_31" component="GoC_00298" size="1"/>
        <population id="golgi_cell_pop_32" component="GoC_00774" size="1"/>
        <population id="golgi_cell_pop_33" component="GoC_00271" size="1"/>
        <population id="golgi_cell_pop_34" component="GoC_00348" size="1"/>
        <population id="golgi_cell_pop_35" component="GoC_00735" size="1"/>
        <population id="golgi_cell_pop_36" component="GoC_00416" size="1"/>
        <population id="golgi_cell_pop_37" component="GoC_00736" size="1"/>
        <population id="golgi_cell_pop_38" component="GoC_00001" size="1"/>
        <population id="golgi_cell_pop_39" component="GoC_00809" size="1"/>
        <population id="golgi_cell_pop_40" component="GoC_040408_C1" size="1"/>
        <population id="golgi_cell_pop_41" component="GoC_00744" size="1"/>
        <population id="golgi_cell_pop_42" component="GoC_00508" size="1"/>
        <population id="golgi_cell_pop_43" component="GoC_00263" size="1"/>
        <population id="golgi_cell_pop_44" component="GoC_00458" size="1"/>
        <population id="golgi_cell_pop_45" component="GoC_00860" size="1"/>
        <population id="golgi_cell_pop_46" component="GoC_00435" size="1"/>
        <population id="golgi_cell_pop_47" component="GoC_00829" size="1"/>
        <population id="golgi_cell_pop_48" component="GoC_00901" size="1"/>
        <population id="golgi_cell_pop_49" component="GoC_00601" size="1"/>
        <population id="golgi_cell_pop_50" component="GoC_00398" size="1"/>
        <population id="golgi_cell_pop_51" component="GoC_00995" size="1"/>
        <population id="golgi_cell_pop_52" component="GoC_00665" size="1"/>
        <population id="golgi_cell_pop_53" component="GoC_00711" size="1"/>
        <population id="golgi_cell_pop_54" component="GoC_00177" size="1"/>
        <population id="golgi_cell_pop_55" component="GoC_00032" size="1"/>
        <population id="golgi_cell_pop_56" component="GoC_00659" size="1"/>
        <explicitInput target="golgi_cell_pop_0[0]" input="pg"/>
        <explicitInput target="golgi_cell_pop_1[1]" input="pg"/>
        <explicitInput target="golgi_cell_pop_2[2]" input="pg"/>
        <explicitInput target="golgi_cell_pop_3[3]" input="pg"/>
        <explicitInput target="golgi_cell_pop_4[4]" input="pg"/>
        <explicitInput target="golgi_cell_pop_5[5]" input="pg"/>
        <explicitInput target="golgi_cell_pop_6[6]" input="pg"/>
        <explicitInput target="golgi_cell_pop_7[7]" input="pg"/>
        <explicitInput target="golgi_cell_pop_8[8]" input="pg"/>
        <explicitInput target="golgi_cell_pop_9[9]" input="pg"/>
        <explicitInput target="golgi_cell_pop_10[10]" input="pg"/>
        <explicitInput target="golgi_cell_pop_11[11]" input="pg"/>
        <explicitInput target="golgi_cell_pop_12[12]" input="pg"/>
        <explicitInput target="golgi_cell_pop_13[13]" input="pg"/>
        <explicitInput target="golgi_cell_pop_14[14]" input="pg"/>
        <explicitInput target="golgi_cell_pop_15[15]" input="pg"/>
        <explicitInput target="golgi_cell_pop_16[16]" input="pg"/>
        <explicitInput target="golgi_cell_pop_17[17]" input="pg"/>
        <explicitInput target="golgi_cell_pop_18[18]" input="pg"/>
        <explicitInput target="golgi_cell_pop_19[19]" input="pg"/>
        <explicitInput target="golgi_cell_pop_20[20]" input="pg"/>
        <explicitInput target="golgi_cell_pop_21[21]" input="pg"/>
        <explicitInput target="golgi_cell_pop_22[22]" input="pg"/>
        <explicitInput target="golgi_cell_pop_23[23]" input="pg"/>
        <explicitInput target="golgi_cell_pop_24[24]" input="pg"/>
        <explicitInput target="golgi_cell_pop_25[25]" input="pg"/>
        <explicitInput target="golgi_cell_pop_26[26]" input="pg"/>
        <explicitInput target="golgi_cell_pop_27[27]" input="pg"/>
        <explicitInput target="golgi_cell_pop_28[28]" input="pg"/>
        <explicitInput target="golgi_cell_pop_29[29]" input="pg"/>
        <explicitInput target="golgi_cell_pop_30[30]" input="pg"/>
        <explicitInput target="golgi_cell_pop_31[31]" input="pg"/>
        <explicitInput target="golgi_cell_pop_32[32]" input="pg"/>
        <explicitInput target="golgi_cell_pop_33[33]" input="pg"/>
        <explicitInput target="golgi_cell_pop_34[34]" input="pg"/>
        <explicitInput target="golgi_cell_pop_35[35]" input="pg"/>
        <explicitInput target="golgi_cell_pop_36[36]" input="pg"/>
        <explicitInput target="golgi_cell_pop_37[37]" input="pg"/>
        <explicitInput target="golgi_cell_pop_38[38]" input="pg"/>
        <explicitInput target="golgi_cell_pop_39[39]" input="pg"/>
        <explicitInput target="golgi_cell_pop_40[40]" input="pg"/>
        <explicitInput target="golgi_cell_pop_41[41]" input="pg"/>
        <explicitInput target="golgi_cell_pop_42[42]" input="pg"/>
        <explicitInput target="golgi_cell_pop_43[43]" input="pg"/>
        <explicitInput target="golgi_cell_pop_44[44]" input="pg"/>
        <explicitInput target="golgi_cell_pop_45[45]" input="pg"/>
        <explicitInput target="golgi_cell_pop_46[46]" input="pg"/>
        <explicitInput target="golgi_cell_pop_47[47]" input="pg"/>
        <explicitInput target="golgi_cell_pop_48[48]" input="pg"/>
        <explicitInput target="golgi_cell_pop_49[49]" input="pg"/>
        <explicitInput target="golgi_cell_pop_50[50]" input="pg"/>
        <explicitInput target="golgi_cell_pop_51[51]" input="pg"/>
        <explicitInput target="golgi_cell_pop_52[52]" input="pg"/>
        <explicitInput target="golgi_cell_pop_53[53]" input="pg"/>
        <explicitInput target="golgi_cell_pop_54[54]" input="pg"/>
        <explicitInput target="golgi_cell_pop_55[55]" input="pg"/>
        <explicitInput target="golgi_cell_pop_56[56]" input="pg"/>
    </network>
</neuroml>
